// SBML level 2 version 3

model multisite1()

  // Compartments:
  compartment cell = 1;

  // Species:
  species E_s in cell = Etot; E_s is "E(s)";
  species F_s in cell = Ftot; F_s is "F(s)";
  species S_p1_U in cell = Stot; S_p1_U is "S(p1~U)";
  species E_s_1_S_p1_U_1 in cell = 0; E_s_1_S_p1_U_1 is "E(s!1).S(p1~U!1)";
  species S_p1_P in cell = 0; S_p1_P is "S(p1~P)";
  species F_s_1_S_p1_P_1 in cell = 0; F_s_1_S_p1_P_1 is "F(s!1).S(p1~P!1)";

  // Parameters:
  Etot = 5360;
  Ftot = 1160;
  Stot = 5360;
  kOnE = 0.7;
  kOffE = 3;
  kCatE = 5;
  kOnF = 0.7;
  kOffF = 3;
  kCatF = 5.1;

  // Assignment rules:
  Efree := 0 + E_s;
  Ffree := 0 + F_s;
  S1P := S_p1_P + F_s_1_S_p1_P_1;

  // Reactions:
  R1: E_s + S_p1_U => E_s_1_S_p1_U_1; kOnE*E_s*S_p1_U;
  R2: E_s_1_S_p1_U_1 => E_s + S_p1_U; kOffE*E_s_1_S_p1_U_1;
  R3: E_s_1_S_p1_U_1 => E_s + S_p1_P; kCatE*E_s_1_S_p1_U_1;
  R4: F_s + S_p1_P => F_s_1_S_p1_P_1; kOnF*F_s*S_p1_P;
  R5: F_s_1_S_p1_P_1 => F_s + S_p1_P; kOffF*F_s_1_S_p1_P_1;
  R6: F_s_1_S_p1_P_1 => F_s + S_p1_U; kCatF*F_s_1_S_p1_P_1;

  // Unit definitions:
  unit substance = item;
end
